# 1. Расчет выходного усилителя мощности
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# Исходные данные:
P_вых := 1.2  # Вт
R_н1 := 75  # Ом
Δf_д := 10*10^3  # Гц
f_раб := 630*10^6  # Гц
# Подберем граничную частоту и выберем транзистор.Исходя из данных выберем транзистор 2Т913Б
# Параметры транзистора 2Т913Б:
S_гр := 0.11  # См
U_к0 := 20  # В
h_21э := 50
T_ср := 25  # (град С)
R_пк := 10  # Град С/ Вт
f_гр := 1*10^9  # Гц
C_э := 50*10^-12  # Ф
C_к := 7.5*10^-12  # Ф
U_шт := 0.7  # В
U_бэдоп := 3.5  # В
r_б := 1  # Ом
r_э := 0.2
# Ом
C_ка := C_к/3 = 2.5e-12  # Ф
L_б := 2.5*10^-9  # Гн
L_э := 0.25*10^-9  # Гн
# Выбираем угол отсечки в 90 градусов,тогда получим коэффициенты:
θ := π/2
α_1 := 0.5
γ_0 := 0.319
γ_1 := 0.5
g_1 := 1.57
# Коллекторная цепь
η_квых := 0.75
P_вых1 := P_вых/η_квых = 1.6  # Вт
# 1.1 Напряженность граничного режима
ξ_гр := 0.5 + 0.5*sqrt(1 - 8*P_вых1/(α_1*S_гр*U_к0^2)) = 0.823335
# 1.2. Амплитуда первой гармоники колллекторного напряжения и тока:
U_к1 := ξ_гр*U_к0 = 16.4667
I_к1 := 2*P_вых1/U_к1 = 0.194332
# 1.3. Постоянные составляющие  коллекторного базового и эмиттерного токов:
I_к0 := I_к1/g_1 = 0.123778  # (А)
I_б0 := I_к0/h_21э = 0.00247556  # (А)
I_э0 := I_к0 + I_б0 = 0.126254  # (А)
# 1.4. Максимальная величина коллекторного тока
I_кmax := I_к0/α_1 = 0.247556  # (А)
# 1.5. Мощность, потребляемая от источника коллекторного питания и рассеиваемая на коллекторе транзистора соответственно:
P_0 := I_к0*U_к0 = 2.47556  # (Вт)
P_к := P_0 - P_вых1 = 0.875562  # (Вт)
# 1.6. КПД коллекторной цепи
η_э := P_вых1/P_0 = 0.646318
# 1.7. Эквивалентное сопротивление коллекторной нагрузки току первой гармоники:
R_к1 := U_к1^2/(2*P_вых1) = 84.735  # (Ом)
# 1.8. Максимальная температура коллекторного перехода:
T_пmax := T_ср + P_к*R_пк = 33.7556
T_пmax < T_пдоп
# 2. Базовая цепь
# 2.1. Дополнительное сопротивление между базой и эмиттером:
R_д := h_21э/(2*π*f_гр*C_э) = 159.155  # (в реальных схемах на частотах f>3*fгр/h_21э R_д можно не ставить)
# 2.2. Амплитуда базового тока
χ := 1 + γ_1*2*π*f_гр*C_к*R_к1 = 2.99652
I_б1 := χ*sqrt(1 + (h_21э*f_раб/f_гр)^2)/(h_21э*γ_1)*I_к1 = 0.734092  # (А)
# 2.3. Максимальное обратное напряжение на эмиттерном переходе:
U_бэmax := I_б1*(1 + cos(θ))*R_д/sqrt(1 + (h_21э*f_раб/f_гр)^2) - U_шт = 3.00716  # (В)
U_бэmax ≤ U_бэдоп  # условие*выполнется  # и Rд не надо уменьшить)
3.007 < 3.5
# 2.4. Напряжение смещения на эмиттерном переходе:
U_б0 := γ_0*R_д*I_б1/(h_21э*f_раб/f_гр)^2 + U_шт + I_б0*r_б + I_э0*r_э = 0.765288  # (В)
# 2.5. Активная и реактивная составляющие входного сопротивления транзистора
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r_вх := 1/χ*((1 + γ_1*2*π*f_гр*C_ка*R_к1)*r_б + r_э + γ_1*2*π*f_гр*L_э) = 0.884661  # (Ом)
R_вх := 1/χ*(r_б + (1 + γ_1*h_21э)*r_б - r_вх + R_д*(1 - γ_1)) = 35.2718  # (Ом)
r_вх1 := r_вх + R_вх/(1 + (h_21э*f_раб/f_гр)^2) = 0.920172  # (Ом)
L_вх := L_б + L_э/χ = 2.58343e-9  # (Гн)
x_вх1 := 2*π*f_раб*L_вх - R_вх*(h_21э*f_раб/f_гр)^2/(1 + (h_21э*f_раб/f_гр)^2) = -25.01
z_вх1 := r_вх + i*x_вх1  # error: Эта переменная не определена.
C_вх := h_21э/(2*π*f_гр*R_вх) = 2.25612e-10  # (Ф)
# 2.6. Мощность возбуждения:
P_в1 := 0.5*I_б1^2*r_вх1 = 0.247936  # (Вт)
# 2.7.  Коэффициент усиления по мощности:
K_р := P_вых1/P_в1 = 6.45328
# 3 Расчет элементов схемы усилителя и согласующих цепей
# Расчет цепей питания
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# 3.1. Блокировочная индуктивность, развязывающая цепь источника питания по высокой частоте:
L_бл2 := 20*R_к1/(2*π*f_раб) = 4.28127e-7  # (Гн)
# 3.2. Для исключения прохождения постояннной составляющей тока в нагрузку
C_бл1 := 50/(2*π*f_раб*R_к1) = 1.49069e-10  # (Ф)
# 3.3. Для исключения прохождения переменной составляющей тока в источник питания
# (сопротивление источника питания возьмем 10 Ом)
R_ип := 10
C_бл2 := 50/(2*π*f_раб*R_ип) = 1.26313e-9  # (Ф)
# 4 Расчет выходной согласующей цепи
# 4.1 Находим действующее сопротивление
Q_1 := 3
R_н1 = 75  # (Ом)
r_д := R_к1/(Q_1^2 + 1) = 8.4735  # (Ом)
# Проверим выполнение условия r_д <  R_н =75, иначе согласование было бы невозможным
# 4.2 Определим реактивные сопротивления
X_пар1 := R_к1/Q_1 = 28.245  # (Ом)
X_штпосл1 := Q_1*r_д = 25.4205  # (Ом)
# 4.3 Рассчитаем необходимую величину добротности второго Г -звена
Q_2 := sqrt(R_н1/r_д - 1) = 2.80198
# 4.4 Определим реактивное сопротивление:
X_шт2посл := Q_2*r_д = 23.7426  # (Ом)
X_пар2 := r_вх1/Q_2 = 0.3284  # (Ом)
# 4.5 Найдем последовательное реактивное сопротивление П-цепи
X_ппосл := |X_штпосл1 + X_шт2посл| = 49.1631  # (Ом)
# 4.6 Вычислим величину индуктивностей и емкостей:
# (Гн)
L_2 := X_ппосл/(2*π*f_раб) = 1.24199e-8
С_1 := 1/(2*π*f_раб*X_пар1) = 8.94412e-12  # (Ф)
# 5. Расчет умножителя частоты
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# 5.1. Параметры транзистора КТ637А
# Оконечный каскад умножения
f_к := 315*10^6  # (Гц)  # (Входная частота каскада умножения)
f_краб := 630*10^6  # (Гц)  # (Выходная частота каскада умножения)
f_гр := 3000*10^6  # (Гц)
h_21э := 80
r_б := 2  # (Ом)
U_шт := 0.7  # (В)
U_кэmax := 30  # (В)
I_кmax := 300*10^-3  # (А)
P_рmax := 1000*10^-3  # (Вт)
U_к0 := 20  # (В)
S_гр := 0.1  # (См)
R_н := 400  # (Ом)
# 5.2 Найдем выходную мощность
K_р := 3  # (Коэффициент усиления по мощности 4-го каскада умножения)
η_квых := 0.6  # (КПД выходной согласующей цепи)
P_н := 0.106  # (Вт)
P_вых := P_н*K_р = 0.318  # (Вт)  # (выходная мощность каскада умножения)
P_вых2 := P_вых/η_квых = 0.53  # (Вт)  # (выходная мощность на выходе транзистора)
# 5.3 Для обеспечения режима работы транзистора зададимся углом θ=90 получим параметры
θ := π/2
γ_0 := 0.319
α_2 := 0.212
g_2 := 0.66
γ_2 := g_2*γ_0 = 0.21054
# Напряженность граничного режима работы транзистора
ξ_гр := 0.5 + 0.5*sqrt(1 - 8*P_вых2/(α_2*S_гр*U_к0^2)) = 0.853553
# Амплитуда второй гармоники коллекторного напряжения
U_к2 := ξ_гр*U_к0 = 17.0711  # (В)
# Амплитуда второй гармоники коллекторного тока
I_к2 := 2*P_вых2/U_к2 = 0.0620934  # (А)
# Постоянная составляющая коллекторного тока
I_к0 := I_к2/g_2 = 0.0940809  # (А)
# 5.4 Мощность, подводимая к транзистору от источника питания в коллекторной цепи
P_0 := I_к0*U_к0 = 1.88162  # (Вт)
# Мощность, рассеиваемая коллектором транзистора
P_к := P_0 - P_вых2 = 1.35162  # (Вт)
# Эквивалентное сопротивление коллекторной цепи для второй гармоники коллекторного тока
R_к2 := U_к2/I_к2 = 274.926  # (Ом)
# Электронный КПД
η_э := P_вых2/P_0 = 0.281673
# Амплитуда первой гармоники напряжения на базе
U_б1 := I_к2/(S_гр*γ_2) = 2.94924  # (В)
# Напряжение смещения на базе
U_б0 := -U_б1*cos(θ) + U_шт = 0.7  # (В)
# Постоянная составляющая тока на базе
I_б0 := I_к0/h_21э = 0.00117601  # (А)
# 5.5 Выберем ток делителя из соотношения 3...5 I_б0
I_д := 4*I_б0 = 0.00470404  # (А)
R_1 := (U_к0 - U_б0)/I_д = 4102.85  # (Ом)
R_2 := U_б0/(I_д + I_б0) = 119.047  # (Ом)
P_в1 := P_н = 0.106  # (Ом)  # (выходная мощность предыдущего каскада)
# Коэффициент усиления по мощности
K_p := P_вых2/P_в1 = 5  # (без учета кпд согласующей цепи)
# 6.Расчет элементов схемы
# 6.1 Характиристическое сопротивление контура
ρ := 30  # (Ом)
# Добротность нагруженного контура
Q := R_к2/ρ = 9.16419
# Добротность ненагруженного контура
Q_шт := 50
# Сопротивление потерь
r_пот := ρ/Q_шт = 0.6  # (Ом)
r_вн := ρ/Q - r_пот = 2.67361  # (Ом)
# Сопротивление связи
X_св := sqrt(R_н*r_вн) = 32.7024  # (Ом)
# 6.2 Емкость связи
n := 2  # (Номер гармоники, с которой мы работаем)
C_св := 1/(2*π*n*f_к*X_св) = 7.72504e-12  # (Ф)
# Индуктивность контура
L_1 := ρ/(2*π*n*f_к*X_св) = 2.31751e-10  # (Гн)
# Общая емкость контура
C_к := 1/(2*π*n*f_к*ρ) = 8.4209e-12  # (Ф)
# 6.3 Сопротивление источника питания пологаем равным 10 Ом
r_ип := 10  # (Ом)
C_бл1 := 50/(2*π*f_к*r_ип) = 2.52627e-9  # (Ф)
C_бл2 := 50/(2*π*n*f_к*r_ип) = 1.26313e-9  # (Ф)
# 7. Расчет кварцевого автогенератора
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# Для расчета выбираем схему частотно модулируемого автогенератора с кварцем, включенным в контур.
# Схема с КР в контуре удобна тем, что возбуждение может происходить как на основной частоте, так и на механических гармониках. Так же схема позволяет включить в колебательный контур варикап, для осуществления прямой частотной модуляции.
P_н := 0.15*10^-3
(мощность*в*нагрузке)  # (Вт)
# Параметры кварцевого резонатора марки  РК169 (МА) на частоту f=23.3 МГц
f_кв := 23.3*10^6  # (Гц)
r_кв := 50  # (Ом)
C_0 := 5*10^-12  # (Ф)
P_кв.доп := 1*10^-3
Q_кв := 5*10^5
# Параметры транзистора КТ306Б
f_гр := 200*10^6  # (Гц)
h_21э := 40
r_б := 40  # (Ом)
U := 0.6  # (В)
U_ки := 7  # (В)
U_эб.доп := 4  # (В)
P_рас.доп := 0.15  # (Вт)
I_кмдоп := 0.03  # (А)
C_ка := 1.5*10^-12  # (Ф)
# 7.1 Коэффициенты разложения косинусоидального импульса при угле отсечке θ=60 градусов
θ := π/3
α_0 := 0.218
α_1 := 0.391
γ_0θ60 := 0.109
γ_1 := 0.196
γ_0θ120 := 0.609
# 7.2 Вычислим нормированную статическую емкость КВ:
τ_0 := (2*π*f_кв)*r_кв*C_0 = 0.0365996
# 7.3 Режим автогенератора выбираем недонапряженным, для уменьшения тока во входной цепи:
U_к0 := 0.8*U_ки = 5.6  # (В)
# 7.4 Сопротивление резистора R и коэффициент m:
R := r_кв/τ_0 = 1366.14  # (Ом)
m := r_кв/R = 0.0365996
# 7.5 Определим мощности, рассеиваемые на кварце и отдаваемая транзистором:
P_кв := 0.9*P_кв.доп = 0.0009  # (Вт)
P_r := P_кв*m = 3.29396e-5  # (Вт)
# 7.6 Параметр
a := P_н/(P_кв + P_r) = 0.160782
# удовлетворяет рекомендованному значению а<0.25
# 7.7 Максимальное значение импульсного коллекторного тока:
μ := f_кв/f_гр = 0.1165
B := 15*r_б = 600
D := 2*P_кв*(1 + m)^2/(r_кв*α_1^2) = 0.000253029
I_км := h_21э*(1 + μ^2*h_21э^2)/B*(-1 + μ*sqrt(D*B^2*(1 + μ^2*h_21э^2) - h_21э^2))*10^-3 = 0.00230707  # (А)
# 7.8 Рассчитаем апроксимированные параметры транзистора:
S_п := 15*I_км = 0.0346061  # (См)  # (крутизна по переходу)
r := h_21э/S_п = 1155.87  # (Ом)  # (сопротивление рекомбинации)
S := h_21э/(r_б + r) = 0.0334485  # (См)  # (крутизна)
f_s := f_гр/(S*r_б) = 149483398  # (Гц)
Ω_s := f_кв/f_s = 0.15587
S_f := S/sqrt(1 + Ω_s^2) = 0.0330495  # (См)
S_1 := S*γ_1 = 0.00655591  # (См)
# 8. Расчет параметров колебательной системы АГ
# Рассчитаем параметры колебательной системы АГ( при учете самофазирования)
# 8.1 Сопротивление ветвей контура
X_2Φ := -Ω_s/S_1 = -23.7755
X_1 := -(r_кв*(1 + a)*(1 + Ω_s^2)/(Ω_s*(1 + m))) = -367.936
χ := 0.5*I_км^2*γ_1/(P_кв*(1 + a)*S*(1 - cos(θ)^2)) = 0.0199029
ν := -(1 + χ)*X_1/r_кв = 7.50517
ν/(2*Q_кв) = 7.50517e-6  # ( Что удовлетворяет требованию допустимой нестабильности 10^-5)
# 8.2 Емкость контура
C_1 := -(1/(2*π*f_кв*X_1)) = 1.85649e-11  # (Ф)
C_2Φ := -(1/(2*π*f_кв*X_2Φ)) = 2.87299e-10  # (Ф)
# 8.3 Эквивалентное реактивное сопротивление КР с учетом резистора R:
X_квэ := -(r_кв*τ_0/(1 + m)^2) = -1.70304
# Тогда сопротивление плеча контура между коллектором и базой:
X_з := -(X_1 + X_2Φ + X_квэ) - ((Ω_s*r_кв) + (1 + a)/(1 + m)) = 384.501
# 8.4 Оценим индуктивность:
# Возьмем характирестическое сопротивление:
ρ := 100
L_з := ρ/(2*π*f_кв) = 6.83068e-7  # (Гн)
# Найдем C_3
C_3 := 1/(2*π*f_кв*(2*π*f_кв*L_з + X_з)) = 1.40984e-11  # (Ф)
# 9. Расчет параметров режима работы транзистора
# 9.1 Постоянаая составляющая и первая гармоника коллекторного тока (13.25)
I_к0 := I_км*α_0 = 0.000502941  # (А)
I_к1 := I_км*α_1 = 0.000902064  # (А)
# 9.2 Постоянная составляющая тока базы
I_б0 := I_к0/h_21э = 1.25735e-5  # (А)
# 9.3 Амплитуда напряжения возбуждения
U_в1 := I_к1/(S_f*γ_1) = 0.139257  # (В)
# Модуль коэффициента обратной связи
K_Φ := X_2Φ*sqrt(1 + Ω_s^2)/X_1 = 0.0653989
# 9.4 Амплитуда коллекторного напряжения
U_к1 := U_в1/K_Φ  # (В)
# 9.5 Напряжение смещения на базе
U_в0 := U + U_в1*(γ_0/sqrt(1 + Ω_s^2) - γ_0*(π - θ)) = 0.550854  # (В)
# 9.6 Мощность, потребляемая в цепи коллектора, колебательная и рассеиваемая транзистором:
P_0 := I_к0*U_к0 = 0.00281647  # (Вт)
P_1 := 0.5*I_к1*U_к1 = 0.000960404  # (Вт)
P_рас := P_0 - P_1 = 0.00185607  # (Вт)
# 10. Расчет параметров элементов цепи питания и смещения:
# Параметры цепи элементов питания и смещения
# 10.1 Выбираем значения сопротивлений R_э  и  R_б
R_б := |15*X_2Φ| = 356.633  # (Ом)
R_э := 400  # (из интервала 100...500 Ом)
# 10.2 Напряжение источников коллекторного питания:
U_к := U_к0 + (I_к0 + I_б0)*R_э = 5.80621  # (В)
# 10.3 Начальное напряжение смещения:
U_нач := U_в0 + (I_к0 + I_б0)*R_э + I_б0*R_б = 0.761544  # (В)
# 10.4 Сопротивление делителя в цепи питания базы:
I_д := 3*I_б0 = 3.77206e-5  # (А)  # (коэффициент выбираем в интервале 3..5)
R_1 := (U_к - U_нач)/I_д = 133738  # (Ом)
R_2 := U_нач/(I_д + I_б0) = 15141.8  # (Ом)
# 10.5 Мощность источника питания
P_и := U_к*I_к0 + U_нач*I_б0 + U_к*I_д = 0.00314877  # (Вт)
# КПД цепи коллектора
η_эк := P_1/P_0 = 0.340996
# КПД АГ
η := P_н/P_и = 0.0476377
# 11. Расчет варикапа
# Для осуществелния частотной модуляции в АГ будем использовать варикап типа КВ109В с параметрами
C_кв := 5*10^-12  # (Ф)
C_в := 8*10^-12  # (Ф)  # емкость варикапа при U=3 В
γ := 0.5
U_пробв := 28  # (В)
Q_в := 160
U_0в := U_пробв/2 = 14  # (В)
# 11.1 Найдем емкость варикапа при напряжении Uов
φ_р := 0.6  # (В)  # контактная разность потенциалов
C_в0 := C_в*(φ_р/(φ_р + U_0в))^γ = 1.62177e-12  # (Ф)
C_30 := C_3 - C_в0 = 1.24766e-11  # (Ф)  # (емкость в колебательном контуре с учетом варикапа)
β_1 := C_кв*C_в0*γ/(2*(C_30 + C_в0 + C_кв)*(C_30 + C_в0)) = 0.00752892
# 11.2 Амплитуда модулирующего напряжения, подаваемого на варикап
U_Ωв := Δf_д*U_0в/(f_раб*β_1) = 0.0295158  # (В)
# 11.3 Общее напряжение на варикапе
Uв := U_Ωв + U
□ = 13.45  # error: Пустой местозаполнитель.  # (В)
Uв ≤ U_0в  # Условие правильной работы варикапа выполняется
# 12. Расчет элементов цепи генератора
# 12.1 Расчет блокировочных элементов
# примем добротность колебательной системы АГ Q=100
Q_кс := 100
C_ксбл21 := 10/(R_1*2*π*f_кв) = 5.10753e-13  # (Ф)
C_ксбл22 := Q_кс/(R_1*2*π*f_кв) = 5.10753e-12  # (Ф)
# Выберем C_ксбл2 из интервала
# C_ксбл21<C_ксбл2<C_ксбл22
# И примем
C_ксбл2 := 20*10^-12  # (Ф)
# Полагая что внтреннее сопротивление источника питания мало
R_ист := 10  # (Ом)
C_ксбл1 := 30/(R_ист*2*π*f_кв) = 2.04921e-8  # (Ф)
# 12.2 Блокировочная индуктивность L_ксбл1 предотвращает заземление транзистора по высокой частоте
L_ксбл1 := 10*R_1/(2*π*f_кв) = 0.00913519  # (Гн)
# Блокировочная индуктивность, развязывающие по частоте частоту модуляции Ω
r_мод := 200  # (Ом)
L_ксбл2 := 10*r_мод/(2*π*f_кв) = 1.36614e-5  # (Гн)
# Блокировочная емкость выбирается из соотношения 1/(ω*C_ксбл3) << r_мод
f_мод := 200  # (Гц)  # (Выбирается из промежутка 100-3000Гц)
C_ксбл3 := 50/(r_мод*2*π*f_мод) = 0.000198944  # (Ф)
# 12.3 Рассчитаем резистивный делитель в цепи смещения варикапа
E_1 := 20  # (В)  # (Напряжение источника питания варикапа)
# Зададим R_3 и найдем R_4 из соотношения
R_3 := 1*10^3  # (Ом)
U_0 := 14  # (В)  # (Напряжение, падающее на R_4 при токе 6мА)
# Тогда
R_4 := U_0*R_3/(E_1 - U_0) = 2333.33  # (Ом)
